# 计算拉伸后晶界属性和偏聚度。
# Calculate grain boundary excess properties, according to "10.1103/PhysRevMaterials.2.093603"
# .data file is generated from other in.file
# Created by Fusheng Tan (tanfusheng@hnu.edu.cn), 2020-05-29

### Initialization
units  metal
dimension  3
boundary  p  p  p
atom_style  atomic
neighbor  4.0  bin    #check the bin to see if the result is convergent
neigh_modify  delay  5  check  yes

# ### relaxation setting

variable  Temp equal 300		# 弛豫温度

variable  latconst  equal  3.14

variable  relax_step1  equal  50000
variable  relax_step2  equal  50000
variable  tensile_step  equal  500000

variable   eng_rate equal 1e-3    # unit is 1/ps, resulting erate = 1E9 / s

read_data	dump_SGMC_initialModel.0.data

########### Interatomic potential #################
pair_style     eam/alloy
pair_coeff    *  *  WRe_Bonny2017.eam.alloy  W  Re

########### displace atoms or delete atoms ##############

variable atomic_distance equal sqrt(3)/2*${latconst}  # BCC晶格的最近邻原子间距
variable del_cutoff equal  0.65*${atomic_distance}

#displace_atoms  upper  move  0  0  0  units  lattice  # 固定上层晶粒，以确保晶界位置不变（“零位移”本质是固定上层晶粒的变通方案）
#delete_atoms  overlap  ${del_cutoff}  lower  upper	 # 删除组间重叠原子
delete_atoms  overlap  ${del_cutoff}  all  all	 # 删除组间重叠原子

############### Setting ##################

compute new3d all temp  # temperature considering three directions
compute new2d all temp/partial 1 0 1 #  temperature considering two directions

compute	eatom  all  pe/atom
compute	s  all stress/atom  NULL	# 计算单原子应力乘以体积
compute	v  all  voronoi/atom		# 计算单原子体积
variable		sxx   atom  c_s[1]/10000/(c_v[1]+0.001)		# x方向的应力，除以10000之后单位转化为GPa
variable		syy   atom  c_s[2]/10000/(c_v[1]+0.001)		# y方向的应力，除以10000之后单位转化为GPa
variable		szz   atom  c_s[3]/10000/(c_v[1]+0.001)		# z方向的应力，除以10000之后单位转化为GPa
variable		sxy   atom  c_s[4]/10000/(c_v[1]+0.001)		# xy方向的应力，除以10000之后单位转化为GPa
variable		sxz   atom  c_s[5]/10000/(c_v[1]+0.001)		# xz方向的应力，除以10000之后单位转化为GPa
variable		syz   atom  c_s[6]/10000/(c_v[1]+0.001)		# yz方向的应力，除以10000之后单位转化为GPa

variable		Hydrostatic   atom   -(v_sxx+v_syy+v_szz)/3		# 静水压力
variable		Mises   atom   sqrt(((v_sxx-v_syy)^2+(v_syy-v_szz)^2+(v_sxx-v_szz)^2+6*(v_sxy^2+v_sxz^2+v_syz^2))/2)		# Mises压力

################ Run minimization 1 ##########################
reset_timestep  0
thermo  100
thermo_style  custom  step  pe  lx  ly  lz  press  pxx  pyy  pzz

#fix  1  all  box/relax  iso  0  vmax  0.001

#dump  1  all  custom 10000 dump.minimization1.*.lammps id type x y z c_eatom
min_style  cg
minimize  1e-18  1e-18  10000 10000
#undump  1

write_data   Model_Minimization1.data

#unfix  1

#################Rum minimization 2 ######################
#Now allow the box to expand/contract in all directions
reset_timestep  0
thermo  100
thermo_style  custom  step  pe  lx  ly  lz  press  pxx  pyy  pzz

fix  2  all  box/relax  iso  0  vmax  0.001

#dump  2  all  custom 10000 dump.minimization2.*.lammps id type x y z c_eatom
min_style  cg
minimize  1e-18  1e-18  10000  10000
#undump 2

write_data   Model_Minimization2.data

unfix  2

################# Rum minimization 3 ######################
#Now allow the box to expand/contract perpendicular to the GB
reset_timestep  0
thermo  100
thermo_style  custom  step  pe  lx  ly  lz  press  pxx  pyy  pzz

fix  3  all  box/relax  y  0  vmax  0.001

#dump  3  all  custom 10000 dump.minimization3.*.lammps id type x y z c_eatom
min_style  cg
minimize  1e-18  1e-18  10000  10000
#undump 3

write_data   Model_Minimization3.data

unfix  3

print  "---------- The Minimization3 is done -----------"


########################### Relaxation ################################
# ### Step1:  release the pressure in all direction, let the model expands

velocity  all create ${Temp} 233333 dist gaussian units box

reset_timestep 0

timestep 0.001
thermo  100
thermo_style custom step temp pe press pxx pyy pzz

dump  1  all  custom  10000  dump_relax_${Temp}K.*.lammpstrj  id  type x y z  c_eatom

fix  1  all  npt  temp  ${Temp}  ${Temp}  0.1  iso 0 0 1   #Tdamp=100*dt; Pdamp=1000*dt
run  ${relax_step1}

unfix 1
undump 1

write_data	Model_Relaxed.data

print  "---------- 全方位驰豫已完成 -----------"

###Store final cell length for strain calculation
variable tmpy equal ly
variable L0 equal ${tmpy}
print  "Initial length, L0 = ${L0}"


########################### 拉伸 ################################

reset_timestep 0

### In units metal, pressure is in [bars]; p2, p3, p4 are in GPa
variable      deltaL  equal  (ly-${L0})
variable      p1  equal  v_deltaL
variable      p2  equal  -pxx/10000
variable      p3  equal  -pyy/10000
variable      p4  equal  -pzz/10000
variable      strainy equal v_deltaL/${L0}
fix def1 all print 100 "${strainy} ${p3}" file Tensile_data.txt screen no

###display thermo message
thermo 100
thermo_style custom step temp pe  lx  ly  lz  press  pxx  pyy  pzz v_strainy v_p2 v_p3 v_p4

dump 1 all custom 10000 dump_tensile.*.lammps id type  x  y  z  c_eatom  v_sxx  v_syy  v_szz  v_sxy  v_sxz  v_syz  v_Hydrostatic  v_Mises

fix 1 all npt temp ${Temp} ${Temp} 0.1 x 0 0 1 z 0 0 1 drag 0.2
fix_modify	1 temp new2d

fix 2 all deform 1 y erate ${eng_rate} units box remap x

run ${tensile_step}
write_restart		model-tensile.restart
write_data		model-tensile.data

undump 1
unfix  1
unfix  2

print "-------------- current strain = ${strainy}-----------------"
